// COMSOL Multiphysics 5.4.0.225 model "model_test.mph"
// Outline of the model tree

Parameters
  b = 2[mm]
  ht = 2[mm]
  ux = 40[mm]
  uy = 40[mm]

Geometry
  geom1 "Geometry 1" (2D, length unit m)
    pol1: Polygon | type = open; source = table; table = {{0, 0}, {0.05, 0.02}, {0.1, 0}}
    fin: Finalize "Form Union"

Materials
  mat1: Common "Material 1" on all boundaries
    def "Basic"
      youngsmodulus = 1400[MPa]
      poissonsratio = 0.4
      density = 1156

Physics
  beam: HermitianBeam on all boundaries
    dependent variable u = {u, v, w}
    BeamFormulation.BeamFormulation = Timoshenko
    emm1: Elastic "Linear Elastic Material 1" (default)
    csd1: CrossSectionBeam "Cross Section Data 1" (default)
      CrossSectionDefinition = CommonSections
      hy_rect = b
      hz_rect = ht
    free1: Free (default)
    init1: init "Initial Values 1" (default)
    fix1: Fixed "Fixed Constraint 1" on points 1

Mesh
  mesh1 "Mesh 1"
    size: MeshSizeDefault | hmax = 0.001; hmin = 2.0E-6; hcurve = 0.2; hauto = 1
    edg1: Edge on all boundaries
      dis1: Distribution on all boundaries | numelem = 1

Studies
  std1 "Study 1"
    stat: Stationary | geometricNonlinearity = on

Solver configurations
  sol1 "Solution 1" (study std1)
    v1: Variables "Dependent Variables 1"
    s1: Stationary "Stationary Solver 1"
      dDef: Direct
      fc1: FullyCoupled | linsolver = dDef; ntermauto = itertol; maxiter = 2000; niter = 100

Datasets
  dset1: Solution | solution = sol1

Plots
  pg1: PlotGroup2D "Stress (beam)" | data = dset1
    line1: Line | expr = beam.disp; linetype = tube; radiusexpr = beam.re
      def: Deform "Deformation" | expr = {u, v}; descr = Displacement field
  pg2: PlotGroup2D "Moment (beam)" | data = dset1
    line1: Line | expr = beam.Mzl; linetype = tube; radiusexpr = beam.re
      def: Deform "Deformation" | expr = {u, v}; descr = Displacement field
  pg3: PlotGroup2D "Shear Force (beam)" | data = dset1
    line1: Line | expr = beam.Tyl; linetype = tube; radiusexpr = beam.re
      def: Deform "Deformation" | expr = {u, v}; descr = Displacement field
  pg4: PlotGroup2D "Axial Force (beam)" | data = dset1
    line1: Line | expr = beam.Nxl; linetype = tube; radiusexpr = beam.re
      def: Deform "Deformation" | expr = {u, v}; descr = Displacement field